<?xml version="1.0"?>
<?xml-stylesheet type="text/xsl" href="http://jsbsim.sourceforge.net/JSBSim.xsl"?>
<fdm_config name="Lunar Module" version="2.0" release="BETA"
    xmlns:xsi="http://www.w3.org/2001/XMLSchema-instance"
    xsi:noNamespaceSchemaLocation="http://jsbsim.sourceforge.net/JSBSim.xsd">

    <fileheader>
        <author> Jon Berndt </author>
        <filecreationdate> 2002-06-01 </filecreationdate>
        <version> $Revision: 1.11 $ </version>
        <description> NASA/Grumman Lunar Module </description>
    </fileheader>

    <metrics>
        <wingarea unit="FT2"> 0 </wingarea>
        <wingspan unit="FT"> 0 </wingspan>
        <chord unit="FT"> 0 </chord>
        <htailarea unit="FT2"> 0 </htailarea>
        <htailarm unit="FT"> 0 </htailarm>
        <vtailarea unit="FT2"> 0 </vtailarea>
        <vtailarm unit="FT"> 0 </vtailarm>
        <location name="AERORP" unit="IN">
            <x> 0 </x>
            <y> 0 </y>
            <z> 0 </z>
        </location>
        <location name="EYEPOINT" unit="IN">
            <x> -58 </x>
            <y> -21 </y>
            <z> 104.9 </z>
        </location>
        <location name="VRP" unit="IN">
            <x> 0 </x>
            <y> 0 </y>
            <z> 0 </z>
        </location>
    </metrics>

    <mass_balance>
        <ixx unit="SLUG*FT2"> 12750 </ixx>
        <iyy unit="SLUG*FT2"> 13629 </iyy>
        <izz unit="SLUG*FT2"> 16099 </izz>
        <ixy unit="SLUG*FT2"> -652 </ixy>
        <ixz unit="SLUG*FT2"> -231 </ixz>
        <emptywt unit="LBS"> 16370 </emptywt>
        <location name="CG" unit="IN">
            <x> 0 </x>
            <y> 0 </y>
            <z> 0 </z>
        </location>
    </mass_balance>

    <ground_reactions>
        <contact type="BOGEY" name="LADDER">
            <location unit="IN">
                <x> -163 </x>
                <y> 0 </y>
                <z> -105 </z>
            </location>
            <static_friction> 0.9 </static_friction>
            <dynamic_friction> 0.2 </dynamic_friction>
            <rolling_friction> 0.2 </rolling_friction>
            <spring_coeff unit="LBS/FT"> 15000 </spring_coeff>
            <damping_coeff unit="LBS/FT/SEC"> 1000 </damping_coeff>
            <max_steer unit="DEG"> 0.0 </max_steer>
            <brake_group> NONE </brake_group>
            <retractable>0</retractable>
        </contact>
        <contact type="BOGEY" name="LEFT">
            <location unit="IN">
                <x> 0 </x>
                <y> -163 </y>
                <z> -105 </z>
            </location>
            <static_friction> 0.9 </static_friction>
            <dynamic_friction> 0.2 </dynamic_friction>
            <rolling_friction> 0.2 </rolling_friction>
            <spring_coeff unit="LBS/FT"> 15000 </spring_coeff>
            <damping_coeff unit="LBS/FT/SEC"> 1000 </damping_coeff>
            <max_steer unit="DEG"> 0.0 </max_steer>
            <brake_group> NONE </brake_group>
            <retractable>0</retractable>
        </contact>
        <contact type="BOGEY" name="RIGHT">
            <location unit="IN">
                <x> 0 </x>
                <y> -163 </y>
                <z> -105 </z>
            </location>
            <static_friction> 0.9 </static_friction>
            <dynamic_friction> 0.2 </dynamic_friction>
            <rolling_friction> 0.2 </rolling_friction>
            <spring_coeff unit="LBS/FT"> 15000 </spring_coeff>
            <damping_coeff unit="LBS/FT/SEC"> 1000 </damping_coeff>
            <max_steer unit="DEG"> 0.0 </max_steer>
            <brake_group> NONE </brake_group>
            <retractable>0</retractable>
        </contact>
        <contact type="BOGEY" name="REAR">
            <location unit="IN">
                <x> 163 </x>
                <y> 0 </y>
                <z> -105 </z>
            </location>
            <static_friction> 0.9 </static_friction>
            <dynamic_friction> 0.2 </dynamic_friction>
            <rolling_friction> 0.2 </rolling_friction>
            <spring_coeff unit="LBS/FT"> 15000 </spring_coeff>
            <damping_coeff unit="LBS/FT/SEC"> 1000 </damping_coeff>
            <max_steer unit="DEG"> 0.0 </max_steer>
            <brake_group> NONE </brake_group>
            <retractable>0</retractable>
        </contact>
    </ground_reactions>
    <propulsion>
        <engine file="LMdescent">
            <location unit="IN">
                <x> 600 </x>
                <y> 0 </y>
                <z> 0 </z>
            </location>
            <orient unit="DEG">
                <roll> 0.0 </roll>
                <pitch> 0 </pitch>
                <yaw> 0 </yaw>
            </orient>
            <feed>0</feed>
            <feed>1</feed>
            <thruster file="LM_descent_nozzle">
                <location unit="IN">
                    <x> 600 </x>
                    <y> 0 </y>
                    <z> 0 </z>
                </location>
                <orient unit="DEG">
                    <roll> 0.0 </roll>
                    <pitch> 0.0 </pitch>
                    <yaw> 0.0 </yaw>
                </orient>
            </thruster>
        </engine>
        <tank type="OXIDIZER">    <!-- Tank number 0 -->
            <location unit="IN">
                <x> 282.3 </x>
                <y> 0 </y>
                <z> 0 </z>
            </location>
            <capacity unit="LBS"> 9470 </capacity>
            <contents unit="LBS"> 9470 </contents>
        </tank>
        <tank type="FUEL">    <!-- Tank number 1 -->
            <location unit="IN">
                <x> 408.3 </x>
                <y> 0 </y>
                <z> 0 </z>
            </location>
            <capacity unit="LBS"> 8236 </capacity>
            <contents unit="LBS"> 8236 </contents>
        </tank>
    </propulsion>
    <flight_control name="FCS: X-15 SAS">
      <channel name="all">
        <summer name="Pitch Trim Sum">
            <input>fcs/elevator-cmd-norm</input>
            <input>fcs/pitch-trim-cmd-norm</input>
            <clipto>
                <min>-1</min>
                <max>1</max>
            </clipto>
        </summer>

        <aerosurface_scale name="Pitch Command Scale">
            <input>fcs/pitch-trim-sum</input>
            <range>
                <min>-50</min>
                <max>50</max>
            </range>
        </aerosurface_scale>

        <pure_gain name="Pitch Gain 1">
            <input>fcs/pitch-command-scale</input>
            <gain>-0.36</gain>
        </pure_gain>

        <scheduled_gain name="Pitch Scheduled Gain 1">
            <input>fcs/pitch-gain-1</input>
            <gain>0.017</gain>
            <table>
                <independentVar>fcs/elevator-pos-rad</independentVar>
                <tableData>
                    -0.68  -26.548
                    -0.595 -20.513
                    -0.51  -15.328
                    -0.425 -10.993
                    -0.34   -7.508
                    -0.255  -4.873
                    -0.17   -3.088
                    -0.085  -2.153
                    0      -2.068
                    0.085  -2.833
                    0.102  -3.088
                    0.119  -3.377
                    0.136  -3.7
                    0.153  -4.057
                    0.17   -4.448
                    0.187  -4.873
                    0.272  -7.508
                    0.357 -10.993
                    0.442 -15.328
                    0.527 -20.513
                    0.612 -26.548
                    0.697 -33.433
                </tableData>
            </table>
        </scheduled_gain>

        <aerosurface_scale name="Roll Command Scale">
            <input>fcs/aileron-cmd-norm</input>
            <range>
                <min>-20</min>
                <max>20</max>
            </range>
        </aerosurface_scale>

        <pure_gain name="Roll Gain 1">
            <input>fcs/roll-command-scale</input>
            <gain>0.42</gain>
        </pure_gain>

        <pure_gain name="Roll Gain 2">
            <input>fcs/roll-gain-1</input>
            <gain>0.027</gain>
        </pure_gain>

        <aerosurface_scale name="Yaw Command Scale">
            <input>fcs/rudder-cmd-norm</input>
            <range>
                <min>-250</min>
                <max>250</max>
            </range>
        </aerosurface_scale>

        <pure_gain name="Yaw Gain 1">
            <input>fcs/yaw-command-scale</input>
            <gain>0.082</gain>
        </pure_gain>

        <pure_gain name="Yaw Gain 2">
            <input>fcs/yaw-gain-1</input>
            <gain>0.04</gain>
        </pure_gain>

        <pure_gain name="Pitch SAS Feedback">
            <input>velocities/q-rad_sec</input>
            <gain>0.75</gain>
        </pure_gain>

        <pure_gain name="Yaw-Roll Crossover Gain">
            <input>velocities/r-rad_sec</input>
            <gain>-0.9</gain>
        </pure_gain>

        <summer name="Yaw Coupled Aileron Feedback Sum">
            <input>velocities/p-rad_sec</input>
            <input>fcs/yaw-roll-crossover-gain</input>
        </summer>

        <pure_gain name="Roll SAS Gain">
            <input>fcs/yaw-coupled-aileron-feedback-sum</input>
            <gain>-0.5</gain>
        </pure_gain>

        <pure_gain name="Yaw SAS Gain">
            <input>velocities/r-rad_sec</input>
            <gain>0.3</gain>
        </pure_gain>

        <summer name="Elevator Positioning">
            <input>fcs/pitch-scheduled-gain-1</input>
            <input>fcs/pitch-sas-feedback</input>
            <clipto>
                <min>-0.26</min>
                <max>0.61</max>
            </clipto>
        </summer>

        <lag_filter name="Elevator Filter">
            <input>fcs/elevator-positioning</input>
            <c1>600</c1>
            <output>fcs/elevator-pos-rad</output>
        </lag_filter>

        <summer name="Aileron Positioning">
            <input>fcs/roll-gain-2</input>
            <input>fcs/roll-sas-gain</input>
            <clipto>
                <min>-0.35</min>
                <max>0.35</max>
            </clipto>
            <output>fcs/left-aileron-pos-rad</output>
        </summer>

        <summer name="Rudder Positioning">
            <input>fcs/yaw-gain-2</input>
            <input>fcs/yaw-sas-gain</input>
            <clipto>
                <min>-0.52</min>
                <max>0.52</max>
            </clipto>
            <output>fcs/rudder-pos-rad</output>
        </summer>
      </channel>
    </flight_control>
</fdm_config>
