<FDM_CONFIG NAME="T37" VERSION="1.65">
<!--
  File:     T37.xml
  Author:   Aero-Matic v 0.7

  Inputs:
    name:          T37
    type:          two-engine transonic/supersonic fighter
    max weight:    6580 lb
    wing span:     33.833 ft
    length:        29.333 ft
    wing area:     158.86 sq-ft
    gear type:     tricycle
    retractable?:  yes
    # engines:     2
    engine type:   turbine
    engine layout: aft fuselage
    yaw damper?    no
  Outputs:
    wing loading:  41.42 lb/sq-ft
    CL-alpha:      3.6 per radian
    CL-0:          0.08
    CL-max:        1
    CD-0:          0.024
    K:             0.09

    Sources:

      * http://www.wpafb.af.mil/museum/newold/t37.htm
      SPECIFICATIONS
        Span:   10.32 meters (33 ft. 10 in.)
        Length:  8.92 meters (29 ft.  4 in.)
        Height:  2.79 meters ( 9 ft.  5 in.)
        Weight: 4,056 lbs. empty
                6,580 lbs. max.
        Armament: None
        Engines: Two Continental J69-T-25s of 1,025 lbs. thrust ea.
        Crew: Two

      PERFORMANCE
        Maximum speed:   425 mph (370 Kt)
        Cruising speed:  350 mph.
        Range:           650 miles
        Service Ceiling: 35,000 ft.

    * Jeff Scott
      Cessna A-37/T-37, cruise configuration
      small twin jet engine military trainer, data from:
        Roskam, Jan. Airplane Flight Dynamics and Automatic Flight
        Controls, Part I. Lawrence KS: DARcorporation, 1995,
        pg 501-503

-->

 <METRICS>
   AC_WINGAREA  182.0		<!-- Roskam -->
   AC_WINGSPAN  33.83		<!-- Roskam -->
   AC_CHORD      5.47		<!-- Roskam -->
   AC_HTAILAREA 31.77
   AC_HTAILARM  11.73
   AC_VTAILAREA 28.59
   AC_LV        11.73
   AC_IXX       7985		<!-- Roskam -->
   AC_IYY       6000		<!-- David Culp, Roskam defines 3326 -->
   AC_IZZ       11183		<!-- Roskam -->
   AC_IXZ       0		<!-- Roskam -->
   AC_EMPTYWT   4056		<!-- Roskam defines 6360 -->
   AC_CGLOC       0.0  0.0 -8.8
   AC_AERORP      0.0  0.0  0.0
   AC_EYEPTLOC  -13.1  0.0 18.6
   AC_VRP      -118.57 0.0 -8.8
 </METRICS>
 <UNDERCARRIAGE>
  AC_GEAR NOSE_LG  -61.57 0.0 -31.4 3274.0 658.0  0.5  0.8  0.02 STEERABLE NONE  5.0 RETRACT
  AC_GEAR LEFT_MLG    6.7 -31.7 -29.9 6580.0 1316.0  0.5  0.8  0.02 FIXED LEFT  0 RETRACT
  AC_GEAR RIGHT_MLG   6.7 31.7 -29.9 6580.0 1316.0  0.5  0.8  0.02 FIXED RIGHT 0 RETRACT
 </UNDERCARRIAGE>
 <PROPULSION>
  <AC_ENGINE FILE="J69-T25">
    XLOC  40.0
    YLOC -30.0
    ZLOC 0
    PITCH 0
    YAW 0
    FEED 0
    <AC_THRUSTER FILE="direct">
      XLOC  40.0
      YLOC -30.0
      ZLOC 0
      PITCH 0
      YAW 0
    </AC_THRUSTER>
  </AC_ENGINE>
  <AC_ENGINE FILE="J69-T25">
    XLOC  40.0
    YLOC 30.0
    ZLOC 0
    PITCH 0
    YAW 0
    FEED 1
    <AC_THRUSTER FILE="direct">
      XLOC  40.0
      YLOC 30.0
      ZLOC 0
      PITCH 0
      YAW 0
    </AC_THRUSTER>
  </AC_ENGINE>
  <AC_TANK TYPE="FUEL" NUMBER="0">
    XLOC  0.0
    YLOC 0
    ZLOC -8.7999
    RADIUS 1
    CAPACITY   700.0
    CONTENTS   350.0
  </AC_TANK>
  <AC_TANK TYPE="FUEL" NUMBER="1">
    XLOC 0.0
    YLOC 0
    ZLOC -8.7999
    RADIUS 1
    CAPACITY   700.0
    CONTENTS   350.0
  </AC_TANK>
 </PROPULSION>
 <FLIGHT_CONTROL NAME="T37">
   <COMPONENT NAME="Pitch Trim Sum" TYPE="SUMMER">
      INPUT   fcs/elevator-cmd-norm
      INPUT   fcs/pitch-trim-cmd-norm
      CLIPTO  -1 1
   </COMPONENT>
   <COMPONENT NAME="Elevator Control" TYPE="AEROSURFACE_SCALE">
      INPUT   fcs/pitch-trim-sum
      MIN     -0.350
      MAX      0.300
      OUTPUT  fcs/elevator-pos-rad
   </COMPONENT>
   <COMPONENT NAME="Roll Trim Sum" TYPE="SUMMER">
      INPUT   fcs/aileron-cmd-norm
      INPUT   fcs/roll-trim-cmd-norm
      CLIPTO  -1 1
   </COMPONENT>
   <COMPONENT NAME="Left Aileron Control" TYPE="AEROSURFACE_SCALE">
      INPUT   fcs/roll-trim-sum
      MIN    -0.35
      MAX     0.35
      OUTPUT  fcs/left-aileron-pos-rad
   </COMPONENT>
   <COMPONENT NAME="Right Aileron Control" TYPE="AEROSURFACE_SCALE">
      INPUT  -fcs/roll-trim-sum
      MIN    -0.35
      MAX     0.35
      OUTPUT  fcs/right-aileron-pos-rad
   </COMPONENT>
   <COMPONENT NAME="Yaw Trim Sum" TYPE="SUMMER">
      INPUT   fcs/rudder-cmd-norm
      INPUT   fcs/yaw-trim-cmd-norm
      CLIPTO  -1 1
   </COMPONENT>
   <COMPONENT NAME="Rudder Control" TYPE="AEROSURFACE_SCALE">
      INPUT   fcs/yaw-trim-sum
      MIN     -0.35
      MAX      0.35
      OUTPUT  fcs/rudder-pos-rad
   </COMPONENT>
   <COMPONENT NAME="Flaps Control" TYPE="KINEMAT">
     INPUT   fcs/flap-cmd-norm
     DETENTS 3
             0   0
             15  4
             30  3
     OUTPUT  fcs/flap-pos-deg
   </COMPONENT>
   <COMPONENT NAME="Gear Control" TYPE="KINEMAT">
     INPUT   gear/gear-cmd-norm
     DETENTS 2
             0   0
             1   5
     OUTPUT  gear/gear-pos-norm
   </COMPONENT>
   <COMPONENT NAME="Speedbrake Control" TYPE="KINEMAT">
     INPUT   fcs/speedbrake-cmd-norm
     DETENTS 2
             0   0
             1   1
     OUTPUT  fcs/speedbrake-pos-norm
   </COMPONENT>
 </FLIGHT_CONTROL>
 <AERODYNAMICS>
  <AXIS NAME="LIFT">
    <GROUP NAME="CLb">
      Basic_lift
      <FACTOR NAME="kCLge" TYPE="VECTOR">
         Change_in_lift_due_to_ground_effect
         13
         aero/h_b-mac-ft
         none
         0.0   1.061
         0.1   1.033
         0.15  1.031
         0.2   1.033
         0.3   1.028
         0.4   1.011
         0.5   1.009
         0.6   1.005
         0.7   1.002
         0.8   1.000
         0.9   1.000
         1.0   1.000
         1.1   1.000
      </FACTOR>
      <COEFFICIENT NAME="CLalpha" TYPE="VECTOR">
        Lift_due_to_alpha
        4
        aero/alpha-rad
        aero/qbar-psf|metrics/Sw-sqft
        -0.20   -0.640
         0.00    0.080
         0.26    1.339
         0.60    0.448
      </COEFFICIENT>
      <COEFFICIENT NAME="dCLflap" TYPE="VALUE">
         Delta_Lift_due_to_flaps
         aero/qbar-psf|metrics/Sw-sqft|fcs/components/flaps-control/output-norm
         0.35
      </COEFFICIENT>
    </GROUP>
    <!-- Roskam -->
    <COEFFICIENT NAME="CLadot" TYPE="VALUE">
       Delta_Lift_due_to_alpha_rate
       aero/qbar-psf|metrics/Sw-sqft|aero/alphadot-rad_sec|aero/ci2vel
       2.0
    </COEFFICIENT>
    <!-- Roskam -->
    <COEFFICIENT NAME="CLq" TYPE="VALUE">
        Lift_due_to_pitch_rate
        aero/qbar-psf|metrics/Sw-sqft|velocities/q-aero-rad_sec|aero/ci2vel
        4.1
    </COEFFICIENT>
    <COEFFICIENT NAME="dCLsb" TYPE="VALUE">
       Delta_Lift_due_to_speedbrake
       aero/qbar-psf|metrics/Sw-sqft|fcs/speedbrake-pos-norm
       0
    </COEFFICIENT>
    <!-- Roskam -->
    <COEFFICIENT NAME="CLde" TYPE="VALUE">
       Lift_due_to_Elevator_Deflection
       aero/qbar-psf|metrics/Sw-sqft|fcs/elevator-pos-rad
       0.5
    </COEFFICIENT>
  </AXIS>
  <AXIS NAME="DRAG">
    <GROUP NAME="CDb">
      Basic_drag
      <FACTOR NAME="kCDge" TYPE="VECTOR">
         Change_in_drag_due_to_ground_effect
         13
         aero/h_b-mac-ft
         none
         0.0   0.81
         0.1   0.99
         0.15  0.95
         0.2   0.98
         0.3   0.99
         0.4   1.00
         0.5   1.04
         0.6   1.01
         0.7   0.99
         0.8   1.01
         0.9   1.00
         1.0   1.00
         1.1   1.00
      </FACTOR>
      <COEFFICIENT NAME="CD0" TYPE="VECTOR">
         Drag_at_zero_lift
         5
         aero/alpha-rad
         aero/qbar-psf|metrics/Sw-sqft
         -1.57       1.500
         -0.26       0.048
          0.00       0.024
          0.26       0.048
          1.57       1.500
      </COEFFICIENT>
      <!-- Roskam -->
      <COEFFICIENT NAME="CDalpha" TYPE="VALUE">
         Drag_due_to_alpha
         aero/qbar-psf|metrics/Sw-sqft|aero/alpha-rad
         0.384
      </COEFFICIENT>
      <COEFFICIENT NAME="CDmach" TYPE="VECTOR">
         Drag_due_to_mach
         4
         velocities/mach-norm
         aero/qbar-psf|metrics/Sw-sqft
         0.0       0.000
         0.81      0.000
         1.1       0.023
         1.8       0.015
      </COEFFICIENT>
      <COEFFICIENT NAME="CDflap" TYPE="VALUE">
         Drag_due_to_flaps
         aero/qbar-psf|metrics/Sw-sqft|fcs/components/flaps-control/output-norm
         0.075
      </COEFFICIENT>
    </GROUP>
    <COEFFICIENT NAME="CDgear" TYPE="VALUE">
       Drag_due_to_gear
       aero/qbar-psf|metrics/Sw-sqft|gear/gear-pos-norm
       0.02
    </COEFFICIENT>
    <COEFFICIENT NAME="CDsb" TYPE="VALUE">
       Drag_due_to_speedbrakes
       aero/qbar-psf|metrics/Sw-sqft|fcs/speedbrake-pos-norm
       0.024
    </COEFFICIENT>
    <COEFFICIENT NAME="CDbeta" TYPE="VECTOR">
       Drag_due_to_sideslip
       5
       aero/beta-rad
       aero/qbar-psf|metrics/Sw-sqft
       -1.57       1.230
       -0.26       0.050
        0.00       0.00
        0.26       0.050
        1.57       1.230
    </COEFFICIENT>
    <COEFFICIENT NAME="CDde" TYPE="VALUE">
       Drag_due_to_Elevator_Deflection
       aero/qbar-psf|metrics/Sw-sqft|fcs/elevator-pos-norm
       0.075
    </COEFFICIENT>
  </AXIS>
  <AXIS NAME="SIDE">
    <!-- Roskam -->
    <COEFFICIENT NAME="CYb" TYPE="VALUE">
       Side_force_due_to_beta
       aero/qbar-psf|metrics/Sw-sqft|aero/beta-rad
       -0.346
    </COEFFICIENT>
    <!-- H-912 -->
    <COEFFICIENT NAME="DCYbdf" TYPE="VALUE">
       Delta_Side_force_due_to_beta_due_to_gear
       aero/qbar-psf|metrics/Sw-sqft|aero/beta-rad|gear/gear-pos-norm
       -0.2478
    </COEFFICIENT>
    <!-- Roskam -->
    <COEFFICIENT NAME="CYp" TYPE="VALUE">
       Side_force_due_to_roll_rate
       aero/qbar-psf|metrics/Sw-sqft|aero/bi2vel|velocities/p-aero-rad_sec
       -0.0827
    </COEFFICIENT>
    <!-- Roskam -->
    <COEFFICIENT NAME="CYr" TYPE="VALUE">
       Side_force_due_to_yaw_rate
       aero/qbar-psf|metrics/Sw-sqft|aero/bi2vel|velocities/r-aero-rad_sec
       0.3
    </COEFFICIENT>
    <!-- Roskam -->
    <COEFFICIENT NAME="CYdr" TYPE="VALUE">
       Side_force_due_to_rudder
       aero/qbar-psf|metrics/Sw-sqft|fcs/rudder-pos-rad
       0.2
    </COEFFICIENT>
  </AXIS>
  <AXIS NAME="ROLL">
    <!-- Roskam -->
    <COEFFICIENT NAME="Clb" TYPE="VALUE">
       Roll_moment_due_to_beta
       aero/qbar-psf|metrics/Sw-sqft|metrics/bw-ft|aero/beta-rad
       -0.0944
    </COEFFICIENT>
    <!-- Roskam -->
    <COEFFICIENT NAME="Clp" TYPE="VALUE">
       Roll_moment_due_to_roll_rate
       aero/qbar-psf|metrics/Sw-sqft|metrics/bw-ft|aero/bi2vel|velocities/p-aero-rad_sec
       -0.442
    </COEFFICIENT>
    <!-- Roskam -->
    <COEFFICIENT NAME="Clr" TYPE="VALUE">
       Roll_moment_due_to_yaw_rate
       aero/qbar-psf|metrics/Sw-sqft|metrics/bw-ft|aero/bi2vel|velocities/r-aero-rad_sec
       0.0926
    </COEFFICIENT>
    <!-- H-912 -->
    <COEFFICIENT NAME="DClrDg" TYPE="VALUE">
       Roll_moment_due_to_yaw_rate_due_to_gear
       aero/qbar-psf|metrics/Sw-sqft|metrics/bw-ft|aero/bi2vel|velocities/r-aero-rad_sec|gear/gear-pos-norm
       0.1
    </COEFFICIENT>
    <!-- H-912 -->
    <COEFFICIENT NAME="DClrDf" TYPE="VALUE">
       Delta_Roll_moment_due_to_yaw_rate_due_to_flaps
       aero/qbar-psf|metrics/Sw-sqft|metrics/bw-ft|aero/bi2vel|velocities/r-aero-rad_sec|fcs/components/flaps-control/output-norm
       0.18
    </COEFFICIENT>
    <!-- Roskam -->
    <COEFFICIENT NAME="Clda" TYPE="VECTOR">
       Roll_moment_due_to_aileron
       2
       velocities/mach-norm
       aero/qbar-psf|metrics/Sw-sqft|metrics/bw-ft|fcs/left-aileron-pos-rad
       0.0       0.181
       2.0       0.040
    </COEFFICIENT>
    <!-- H-912 -->
    <COEFFICIENT NAME="DCldaDf" TYPE="VALUE">
       Delta_Roll_moment_due_to_aileron_due_to_flaps
       aero/qbar-psf|metrics/Sw-sqft|metrics/bw-ft|fcs/left-aileron-pos-rad|fcs/components/flaps-control/output-norm
       -0.02
    </COEFFICIENT>
    <!-- Roskam -->
    <COEFFICIENT NAME="Cldr" TYPE="VALUE">
       Roll_moment_due_to_rudder
       aero/qbar-psf|metrics/Sw-sqft|metrics/bw-ft|fcs/rudder-pos-rad
       0.015
    </COEFFICIENT>
  </AXIS>
  <AXIS NAME="PITCH">
    <!-- Roskam -->
    <COEFFICIENT NAME="Cmo" TYPE="VALUE">
       Pitching_moment_at_zero_alpha
       aero/qbar-psf|metrics/Sw-sqft|metrics/cbarw-ft
       0.025
    </COEFFICIENT>
    <!-- Roskam -->
    <COEFFICIENT NAME="Cmalpha" TYPE="VALUE">
       Pitch_moment_due_to_alpha
       aero/qbar-psf|metrics/Sw-sqft|metrics/cbarw-ft|aero/alpha-rad
       -0.7
    </COEFFICIENT>
    <!-- Roskam -->
    <COEFFICIENT NAME="Cmadot" TYPE="VALUE">
       Pitch_moment_due_to_alpha_rate
       aero/qbar-psf|metrics/Sw-sqft|metrics/cbarw-ft|aero/ci2vel|aero/alphadot-rad_sec
       -6.95
    </COEFFICIENT>
    <!-- Roskam -->
    <COEFFICIENT NAME="Cmde" TYPE="VECTOR">
       Pitch_moment_due_to_elevator
       2
       velocities/mach-norm
       aero/qbar-psf|metrics/Sw-sqft|metrics/cbarw-ft|fcs/elevator-pos-rad
       0.0       -1.12
       2.0       -0.200
    </COEFFICIENT>
    <!-- David Culp, Roskam defines -14.9 -->
    <COEFFICIENT NAME="Cmq" TYPE="VALUE">
       Pitch_moment_due_to_pitch_rate
       aero/qbar-psf|metrics/Sw-sqft|metrics/cbarw-ft|aero/ci2vel|velocities/q-aero-rad_sec
      -50.0
    </COEFFICIENT>
  </AXIS>
  <AXIS NAME="YAW">
    <!-- Roskam -->
    <COEFFICIENT NAME="Cnb" TYPE="VALUE">
       Yaw_moment_due_to_beta
       aero/qbar-psf|metrics/Sw-sqft|metrics/bw-ft|aero/beta-rad
       0.1106
    </COEFFICIENT>
    <!-- H-912 -->
    <COEFFICIENT NAME="DCnbDg" TYPE="VALUE">
       Delta_Yaw_moment_due_to_beta_due_to_gear
       aero/qbar-psf|metrics/Sw-sqft|metrics/bw-ft|aero/mag-beta-rad|gear/gear-pos-norm
       -0.00963
    </COEFFICIENT>
    <!-- H-912 -->
    <COEFFICIENT NAME="DCnbDf" TYPE="VALUE">
       Delta_Yaw_moment_due_to_beta_due_to_flaps
       aero/qbar-psf|metrics/Sw-sqft|metrics/bw-ft|aero/mag-beta-rad|fcs/components/flaps-control/output-norm
       -0.00882
    </COEFFICIENT>
    <!-- Roskam -->
    <COEFFICIENT NAME="Cnp" TYPE="VALUE">
       Yaw_moment_due_to_roll_rate
       aero/qbar-psf|metrics/Sw-sqft|metrics/bw-ft|aero/bi2vel|velocities/p-aero-rad_sec
       -0.0243
    </COEFFICIENT>
    <!-- H-912 -->
    <COEFFICIENT NAME="DCnpDf" TYPE="VALUE">
       Delta_Yaw_moment_due_to_roll_rate_due_to_flaps
       aero/qbar-psf|metrics/Sw-sqft|metrics/bw-ft|aero/bi2vel|velocities/p-aero-rad_sec
       -0.02
    </COEFFICIENT>
    <!-- Roskam -->
    <COEFFICIENT NAME="Cnr" TYPE="VALUE">
       Yaw_moment_due_to_yaw_rate
       aero/qbar-psf|metrics/Sw-sqft|metrics/bw-ft|aero/bi2vel|velocities/r-aero-rad_sec
       -0.139
    </COEFFICIENT>
    <!-- Roskam -->
    <COEFFICIENT NAME="Cndr" TYPE="VALUE">
       Yaw_moment_due_to_rudder
       aero/qbar-psf|metrics/Sw-sqft|metrics/bw-ft|fcs/rudder-pos-rad
       -0.0365
    </COEFFICIENT>
    <!-- H-912 -->
    <COEFFICIENT NAME="DCndrDf" TYPE="VALUE">
       Delta_Yaw_moment_due_to_rudder_due_to_flaps
       aero/qbar-psf|metrics/Sw-sqft|metrics/bw-ft|fcs/rudder-pos-rad|fcs/components/flaps-control/output-norm
       0.002
    </COEFFICIENT>
    <!-- H-912 -->
    <COEFFICIENT NAME="Cnda" TYPE="VALUE">
       Adverse_yaw
       aero/qbar-psf|metrics/Sw-sqft|metrics/bw-ft|fcs/left-aileron-pos-rad
       -0.0254
    </COEFFICIENT>
  </AXIS>
 </AERODYNAMICS>
</FDM_CONFIG>
