<FDM_CONFIG NAME="c182" VERSION="1.58">
<!--

  File:        c182.xml
  Author:      David Megginson, based on c172.xml by Tony Peden.
  CVS Version: $Id: c182.xml,v 1.10 2002/08/18 15:36:44 jberndt Exp $

  Function: Models a Cessna 182
  Sources: 1. Jan Roskam, Airplane Flight Dynamics and Automatic Flight
              Controls, Part I (1995), pp.480-86
           2. Tony Peden's JSBSim c172.xml model 2001-12-13
-->

  <METRICS>
    <!--
    // Wing area (ft^2)
    // Wing span (ft)
    // Wing avg. chord (ft)
    // H. Tail Area (ft^2)
    // Wing MAC to H.Tail MAC (ft)
    // V. Tail Area (ft^2)
    // Wing MAC to V.Tail MAC (ft)
    // Ixx
    // Iyy
    // Izz
    // Ixz
    // Empty weight
    // Center of gravity location, empty weight, in aircraft's own structural coord
    //   system. X, Y, Z, in inches
    // Pilot's eyepoint location, in aircraft's own coord system, FROM cg.
    //  X, Y, Z, in inches
    AC_AERORP   43.2  0.0    59.4
    -->

    AC_WINGAREA  174   <!-- square feet -->
    AC_WINGSPAN  35.8  <!-- ft          -->
    AC_CHORD     4.9   <!-- ft          -->
    AC_HTAILAREA 21.9  <!-- square feet -->
    AC_HTAILARM  15.7  <!-- ft          -->
    AC_VTAILAREA 16.5  <!-- square feet -->
    AC_LV        15.7  <!-- ft          -->
    AC_IXX    948
    AC_IYY    1346
    AC_IZZ    1967
    AC_IXZ    0
    AC_EMPTYWT   1700
    AC_AERORP    43.2  0.0 59.4
    AC_CGLOC     41.0  0.0 36.5
    AC_POINTMASS 180.0 36.0 -14.0 24.0
    AC_EYEPTLOC  37.0  0.0 48.0

  </METRICS>

  <UNDERCARRIAGE>

    <!--
    The gear parameters that can be specified are as follows, IN ORDER OF APPEARANCE:

    AC_GEAR
    <name>                           name of gear entry - no spaces allowed
    <X> <Y> <Z>                      Gear location in aircraft body coords in inches
    <spring constant>                spring constant in lbs/ft
    <damping coefficient>            damping coefficient in lbs/ft/sec
    <dynamic friction coefficient>   Self-explanatory: sliding friction coefficient
    <static friction coefficient>    Self-explanatory: "onset" friction coefficient
    <rolling friction coefficient>   Self-explanatory: rolling friction coefficient
    <steerability attribute>         One of <STEERABLE | FIXED | CASTERED>
    <brake group membership>         One of <LEFT | CENTER | RIGHT | NOSE | TAIL | NONE>
    <max steer angle>                Maximum steerable angle in degrees
    -->

     AC_GEAR  NOSE        -6.8   0.0 -20.0  1800  600  0.5  0.8 0.02 STEERABLE NONE 20 FIXED
     AC_GEAR  LEFT_MAIN   58.2 -43.0 -17.9  5400 1600  0.5  0.8 0.02 CASTERED  LEFT  0 FIXED
     AC_GEAR  RIGHT_MAIN  58.2  43.0 -17.9  5400 1600  0.5  0.8 0.02 CASTERED  RIGHT 0 FIXED
     AC_GEAR  TAIL_SKID  188.0  0.0    8.0 20000 1000  0.2   0.2 0.2  FIXED NONE 0 FIXED
     AC_GEAR  LEFT_TIP    43.2 -214.8 59.4 10000 2000  0.2   0.2 0.2  FIXED NONE 0 FIXED
     AC_GEAR  RIGHT_TIP   43.2  214.8 59.4 10000 2000  0.2   0.2 0.2  FIXED NONE 0 FIXED

</UNDERCARRIAGE>

  <PROPULSION>

    <!--
      TANKS SECTION

      Tank locations and characteristics, empty weight, in aircraft's own coord system:
      X, Y, Z, in inches
      effective radius of tank, in inches (for fuel slosh, if/when modeled)
      capacity in pounds
      Current contents, in pounds

      ENGINE[S] SECTION

      Engine[s] is|are specified by giving engine name (which corresponds to an engine
      definition file in the "engines" directory) followed by x, y, z placement and
      pitch and yaw orientation. Coordinates are given in inches in the structural
      coordinate frame. Angles for pitch and yaw are specified in radians.

      AC_ENGINE name x y z pitch yaw

      THRUSTER[S] SECTION

      AC_THRUSTER name x y z pitch yaw
    -->

    <AC_ENGINE FILE="engIO540AB1A5">
      XLOC  -19.7
      YLOC    0.0
      ZLOC   26.6
      PITCH   0.0
      YAW     0.0
      FEED      0
      FEED      1
    </AC_ENGINE>

    <AC_THRUSTER FILE="prop_81in2v">
      XLOC  -37.7
      YLOC    0.0
      ZLOC   26.6
      PITCH   0.0
      YAW     0.0
      P_FACTOR 10.0
      SENSE   1.0
    </AC_THRUSTER>

    <AC_TANK TYPE="FUEL" NUMBER="0">
      XLOC   56.0
      YLOC -112.0
      ZLOC   59.4
      RADIUS 29.4
      CAPACITY 300.0
      CONTENTS 200.0
    </AC_TANK>

    <AC_TANK TYPE="FUEL" NUMBER="1">
      XLOC   56.0
      YLOC  112.0
      ZLOC   59.4
      RADIUS 29.4
      CAPACITY 300.0
      CONTENTS 200.0
    </AC_TANK>

  </PROPULSION>

  <FLIGHT_CONTROL NAME="c182">

     <COMPONENT NAME="Pitch Trim Sum" TYPE="SUMMER">
       ID           0
       INPUT        FG_ELEVATOR_CMD
       INPUT        FG_PITCH_TRIM_CMD
       CLIPTO       -1 1
     </COMPONENT>

     <COMPONENT NAME="Elevator Control" TYPE="AEROSURFACE_SCALE">
       ID           1
       INPUT        0
       MIN          -28
       MAX          23
       OUTPUT       FG_ELEVATOR_POS
       GAIN         0.01745
     </COMPONENT>

     <COMPONENT NAME="Roll Trim Sum" TYPE="SUMMER">
       ID           2
       INPUT        FG_AILERON_CMD
       INPUT        FG_ROLL_TRIM_CMD
       CLIPTO       -1 1
     </COMPONENT>

     <COMPONENT NAME="Aileron Control" TYPE="AEROSURFACE_SCALE">
       ID           3
       INPUT        2
       MIN          -20
       MAX          15
       GAIN         0.01745
       OUTPUT       FG_AILERON_POS
     </COMPONENT>

     <COMPONENT NAME="Yaw Trim Sum" TYPE="SUMMER">
       ID           4
       INPUT        FG_RUDDER_CMD
       INPUT        FG_YAW_TRIM_CMD
       CLIPTO       -1 1
     </COMPONENT>

     <COMPONENT NAME="Rudder Control" TYPE="AEROSURFACE_SCALE">
       ID           5
       INPUT        4
       MIN         -16
       MAX          16
       GAIN         0.01745
       OUTPUT       FG_RUDDER_POS
     </COMPONENT>

     <COMPONENT NAME="Flaps Control" TYPE="KINEMAT">
       ID           6
       INPUT        FG_FLAPS_CMD
       DETENTS      4
                    0    0
                    10   2
                    20   1
                    30   1
       OUTPUT       FG_FLAPS_POS
     </COMPONENT>

   </FLIGHT_CONTROL>

   <AERODYNAMICS>

     AC_ALPHALIMITS -0.087 0.28

     <AXIS NAME="LIFT">

        <GROUP NAME="CLb">
          Basic_lift

         <!--
           c172.xml
         -->
         <FACTOR NAME="kCLge" TYPE="VECTOR">
            Change_in_lift_due_to_ground_effect
            13
            FG_HOVERB
            FG_NONE
             0.0   1.203
             0.1   1.127
             0.15  1.090
             0.2   1.073
             0.3   1.046
             0.4   1.055
             0.5   1.019
             0.6   1.013
             0.7   1.008
             0.8   1.006
             0.9   1.003
             1.0   1.002
             1.1   1.0
         </FACTOR>

         <!--
           Roskam p.481
         -->
         <COEFFICIENT NAME="CLo" TYPE="VALUE">
            Lift_at_zero_alpha
            FG_QBAR|FG_WINGAREA
             0.307
         </COEFFICIENT>

         <!--
           c172.xml, with CLo removed
         -->
         <COEFFICIENT NAME="CLalpha" TYPE="VECTOR">
            Lift_due_to_alpha
            11
            FG_ALPHA
            FG_QBAR|FG_WINGAREA
            -0.09  -0.527
             0.00  -0.057
             0.14   0.713
             0.21   0.945
             0.24   1.047
             0.26   1.133
             0.28   1.159
             0.30   1.125
             0.32   1.074
             0.34   0.991
             0.36   0.663
          </COEFFICIENT>

          <!--
            c172.xml
          -->
          <COEFFICIENT NAME="CLDf" TYPE="VECTOR">
            Lift_due_to_flap_deflection
            4
            FG_FLAPS_POS
            FG_QBAR|FG_WINGAREA
             0   0
             10  0.20
             20  0.30
             30  0.35
          </COEFFICIENT>

       </GROUP>

       <!--
         Roskam p.481
       -->
       <COEFFICIENT NAME="CLadot" TYPE="VALUE">
         Lift_due_to_alpha_rate
         FG_QBAR|FG_WINGAREA|FG_ALPHADOT|FG_CI2VEL
          1.7
       </COEFFICIENT>

       <!--
         Roskam p.481
       -->
       <COEFFICIENT NAME="CLq" TYPE="VALUE">
         Lift_due_to_pitch_rate
         FG_QBAR|FG_WINGAREA|FG_AEROQ|FG_CI2VEL
          3.9
       </COEFFICIENT>

       <!--
         Roskam p.481
       -->
       <COEFFICIENT NAME="CLDe" TYPE="VALUE">
         Lift_due_to_elevator_deflection
         FG_QBAR|FG_WINGAREA|FG_ELEVATOR_POS
          0.43
       </COEFFICIENT>

    </AXIS>

    <AXIS NAME="DRAG">

       <!--
         Roskam p.481
       -->
       <COEFFICIENT NAME="CDo" TYPE="VALUE">
         Drag_at_zero_lift
         FG_QBAR|FG_WINGAREA
          0.0270
       </COEFFICIENT>

       <!--
         c172.xml from CDwbh (alpha-dependent flap drag moved to CDDf)
       -->
       <COEFFICIENT NAME="CDalpha" TYPE="VECTOR">
         Drag_due_to_alpha
         26
         FG_ALPHA
         FG_QBAR|FG_WINGAREA
         -0.0872664   0.00407143
         -0.0698132   0.0013424
         -0.0523599   8.96747e-05
         -0.0349066   0.000313268
         -0.0174533   0.00201318
          0           0.0051894
          0.0174533   0.00993967
          0.0349066   0.0162201
          0.0523599   0.0240308
          0.0698132   0.0333717
          0.0872664   0.0442427
          0.10472     0.056644
          0.122173    0.0705754
          0.139626    0.086037
          0.15708     0.096239
          0.174533    0.106859
          0.191986    0.118034
          0.209439    0.129765
          0.226893    0.142366
          0.244346    0.156452
          0.261799    0.172732
          0.279253    0.178209
          0.296706    0.171598
          0.314159    0.161786
          0.331613    0.147493
          0.349066    0.109678
       </COEFFICIENT>

       <!--
         c172.xml
       -->
       <COEFFICIENT NAME="CDbeta" TYPE="VALUE">
         Drag_due_to_sideslip
         FG_QBAR|FG_WINGAREA|FG_ABETA
          0.17
       </COEFFICIENT>

       <!--
         c172.xml, extracted from CDwbh and CDDf
       -->
       <COEFFICIENT NAME="CDDf" TYPE="TABLE">
         Drag_due_to_flap_deflection
         26
         4
         FG_ALPHA
         FG_FLAPS_POS
         FG_QBAR|FG_WINGAREA
                      0          10          20          30
         -0.087266    0.000000    0.002967    0.008441    0.015301
         -0.069813    0.000000    0.006098    0.013138    0.020781
         -0.052360    0.000000    0.009230    0.017836    0.026261
         -0.034907    0.000000    0.012361    0.022533    0.031741
         -0.017453    0.000000    0.015493    0.027230    0.037221
          0.000000    0.000000    0.018624    0.031927    0.042702
          0.017453    0.000000    0.021812    0.036710    0.048281
          0.034907    0.000000    0.025001    0.041492    0.053860
          0.052360    0.000000    0.028189    0.046274    0.059439
          0.069813    0.000000    0.031377    0.051056    0.065019
          0.087266    0.000000    0.034565    0.055838    0.070598
          0.104720    0.000000    0.037753    0.060621    0.076177
          0.122173    0.000000    0.040942    0.065403    0.081757
          0.139626    0.000000    0.044129    0.070185    0.087336
          0.157080    0.000000    0.046078    0.073107    0.090745
          0.174533    0.000000    0.047998    0.075989    0.094107
          0.191986    0.000000    0.049920    0.078871    0.097469
          0.209439    0.000000    0.051841    0.081752    0.100831
          0.226893    0.000000    0.053810    0.084706    0.104277
          0.244346    0.000000    0.055911    0.087858    0.107954
          0.261799    0.000000    0.058224    0.091327    0.112001
          0.279253    0.000000    0.058978    0.092458    0.113320
          0.296706    0.000000    0.058067    0.091092    0.111727
          0.314159    0.000000    0.056682    0.089014    0.109303
          0.331613    0.000000    0.054587    0.085871    0.105636
          0.349066    0.000000    0.048493    0.076730    0.094971
       </COEFFICIENT>

       <!--
         Roskam p.481
       -->
       <COEFFICIENT NAME="CDDe" TYPE="VALUE">
         Drag_due_to_Elevator_Deflection
         FG_QBAR|FG_WINGAREA|FG_AELEVATOR_POS
          0.00
       </COEFFICIENT>

    </AXIS>

    <AXIS NAME="SIDE">

       <!--
         Roskam p.482
       -->
       <COEFFICIENT NAME="CYb" TYPE="VECTOR">
         Side_force_due_to_beta
         2
         FG_ALPHA
         FG_QBAR|FG_WINGAREA|FG_BETA
          0.0000  -0.393
          0.0943  -0.404
       </COEFFICIENT>

       <!--
         Roskam p.482
       -->
       <COEFFICIENT NAME="CYp" TYPE="VECTOR">
         Side_force_due_to_roll_rate
         2
         FG_ALPHA
         FG_QBAR|FG_WINGAREA|FG_BI2VEL|FG_AEROP
          0.0000  -0.075
          0.0943  -0.145
       </COEFFICIENT>

       <!--
         Roskam p.482
       -->
       <COEFFICIENT NAME="CYr" TYPE="VECTOR">
         Side_force_due_to_yaw_rate
         2
         FG_ALPHA
         FG_QBAR|FG_WINGAREA|FG_BI2VEL|FG_AEROR
          0.0000   0.214
          0.0943   0.267
       </COEFFICIENT>

       <!--
         Roskam p.482
       -->
       <COEFFICIENT NAME="CYDa" TYPE="VALUE">
         Side_force_due_to_aileron
         FG_QBAR|FG_WINGAREA|FG_AILERON_POS
          0.0
      </COEFFICIENT>

       <!--
         Roskam p.482
       -->
       <COEFFICIENT NAME="CYDr" TYPE="VALUE">
          Side_force_due_to_rudder
          FG_QBAR|FG_WINGAREA|FG_RUDDER_POS
           0.187
       </COEFFICIENT>

    </AXIS>

    <AXIS NAME="ROLL">

       <!--
         Roskam p.482 (multiplied by beta)
       -->
       <COEFFICIENT NAME="Clb" TYPE="TABLE">
         Roll_moment_due_to_beta
         3
         2
         FG_BETA
         FG_ALPHA
         FG_QBAR|FG_WINGAREA|FG_WINGSPAN
                 0.0000  0.0943
         -0.349  0.0322  0.0312
          0      0       0
          0.349 -0.0322 -0.0312
       </COEFFICIENT>

       <!--
         Roskam p.482
       -->
       <COEFFICIENT NAME="Clp" TYPE="VECTOR">
         Roll_moment_due_to_roll_rate_(roll_damping)
         2
         FG_ALPHA
         FG_QBAR|FG_WINGAREA|FG_WINGSPAN|FG_BI2VEL|FG_AEROP
          0.0000  -0.484
          0.0943  -0.487
       </COEFFICIENT>

       <!--
         Roskam p.482
       -->
       <COEFFICIENT NAME="Clr" TYPE="VECTOR">
         Roll_moment_due_to_yaw_rate
         2
         FG_ALPHA
         FG_QBAR|FG_WINGAREA|FG_WINGSPAN|FG_BI2VEL|FG_AEROR
          0.0000   0.0798
          0.0943   0.1869
       </COEFFICIENT>

       <!--
         Roskam p.482
       -->
       <COEFFICIENT NAME="ClDa" TYPE="VALUE">
         Roll_moment_due_to_aileron
         FG_QBAR|FG_WINGAREA|FG_WINGSPAN|FG_AILERON_POS
          0.229
       </COEFFICIENT>

       <!--
         Roskam p.482
       -->
       <COEFFICIENT NAME="ClDr" TYPE="VALUE">
         Roll_moment_due_to_rudder
         FG_QBAR|FG_WINGAREA|FG_WINGSPAN|FG_RUDDER_POS
         -0.0147
       </COEFFICIENT>

    </AXIS>

    <AXIS NAME="PITCH">

       <!--
         Roskam p.481
       -->
       <COEFFICIENT NAME="Cmo" TYPE="VALUE">
         Pitching_moment_at_zero_alpha
         FG_QBAR|FG_WINGAREA|FG_CBAR
          0.04
       </COEFFICIENT>

       <!--
         Roskam p.481
       -->
       <COEFFICIENT NAME="Cmalpha" TYPE="VECTOR">
         Pitch_moment_due_to_alpha
         2
         FG_ALPHA
         FG_QBAR|FG_WINGAREA|FG_CBAR|FG_ALPHA
          0.0000  -0.613
          0.0943  -0.650
       </COEFFICIENT>

       <!--
         Roskam p.481
       -->
       <COEFFICIENT NAME="Cmadot" TYPE="VECTOR">
         Pitch_moment_due_to_alpha_rate
         2
         FG_ALPHA
         FG_QBAR|FG_WINGAREA|FG_CBAR|FG_CI2VEL|FG_ALPHADOT
          0.0000  -7.27
          0.0943  -5.57
       </COEFFICIENT>

       <!--
         Roskam p.481
       -->
       <COEFFICIENT NAME="Cmq" TYPE="VALUE">
          Pitch_moment_due_to_pitch_rate
          FG_QBAR|FG_WINGAREA|FG_CBAR|FG_CI2VEL|FG_AEROQ
          -12.4
       </COEFFICIENT>

       <!--
         c172.xml
       -->
       <COEFFICIENT NAME="CmDf" TYPE="VECTOR">
          Pitch_moment_due_to_flap_deflection
          4
          FG_FLAPS_POS
          FG_QBAR|FG_WINGAREA|FG_CBAR
          0    0
          10  -0.0654
          20  -0.0981
          30  -0.1140
        </COEFFICIENT>

       <!--
         Roskam p.481
       -->
       <COEFFICIENT NAME="CmDe" TYPE="VECTOR">
         Pitch_moment_due_to_elevator_deflection
         2
         FG_ALPHA
         FG_QBAR|FG_WINGAREA|FG_CBAR|FG_ELEVATOR_POS
          0.0000  -1.122
          0.0943  -1.369
       </COEFFICIENT>

    </AXIS>

    <AXIS NAME="YAW">

       <!--
         Roskam p.482
       -->
       <COEFFICIENT NAME="Cnb" TYPE="VECTOR">
         Yaw_moment_due_to_beta
         2
         FG_ALPHA
         FG_QBAR|FG_WINGAREA|FG_WINGSPAN|FG_BETA
          0.0000   0.0587
          0.0943   0.0907
       </COEFFICIENT>

       <!--
         Roskam p.482
       -->
       <COEFFICIENT NAME="Cnp" TYPE="VECTOR">
         Yaw_moment_due_to_roll_rate
         2
         FG_ALPHA
         FG_QBAR|FG_WINGAREA|FG_WINGSPAN|FG_BI2VEL|FG_AEROP
          0.0000  -0.0278
          0.0943  -0.0649
       </COEFFICIENT>

       <!--
         Roskam p.482
       -->
       <COEFFICIENT NAME="Cnr" TYPE="VECTOR">
         Yaw_moment_due_to_yaw_rate
         2
         FG_ALPHA
         FG_QBAR|FG_WINGAREA|FG_WINGSPAN|FG_BI2VEL|FG_AEROR
          0.0000  -0.0937
          0.0943  -0.1199
       </COEFFICIENT>

       <!--
         Roskam p.482
       -->
       <COEFFICIENT NAME="CnDa" TYPE="VECTOR">
         Yaw_moment_due_to_aileron
         2
         FG_ALPHA
         FG_QBAR|FG_WINGAREA|FG_WINGSPAN|FG_AILERON_POS
          0.0000  -0.0216
          0.0943  -0.0504
       </COEFFICIENT>

       <!--
         Roskam p.482
       -->
       <COEFFICIENT NAME="CnDr" TYPE="VECTOR">
         Yaw_moment_due_to_rudder
         2
         FG_ALPHA
         FG_QBAR|FG_WINGAREA|FG_WINGSPAN|FG_RUDDER_POS
          0.0000  -0.0645
          0.0943  -0.0805
       </COEFFICIENT>

    </AXIS>

  </AERODYNAMICS>

  <!--
    OUTPUT section definition

    The following specifies the way that JSBSim writes out data.

    NAME is the filename you want the output to go to

    TYPE can be:
      CSV       Comma separated data. If a filename is supplied then the data
                goes to that file. If COUT or cout is specified, the data goes
                to stdout. If the filename is a null filename the data goes to
                stdout, as well.
      SOCKET    Will eventually send data to a socket output, where NAME
                would then be the IP address of the machine the data should be
                sent to. DON'T USE THIS YET!
      TABULAR   Columnar data. NOT IMPLEMENTED YET!
      TERMINAL  Output to terminal. NOT IMPLEMENTED YET!
      NONE      Specifies to do nothing. THis setting makes it easy to turn on and
                off the data output without having to mess with anything else.

    The arguments that can be supplied, currently, are

    RATE_IN_HZ  An integer rate in times-per-second that the data is output. This
                value may not be *exactly* what you want, due to the dependence
                on dt, the cycle rate for the FDM.

    The following parameters tell which subsystems of data to output:

    SIMULATION       ON|OFF
    ATMOSPHERE       ON|OFF
    MASSPROPS        ON|OFF
    AEROSURFACES     ON|OFF
    RATES            ON|OFF
    VELOCITIES       ON|OFF
    FORCES           ON|OFF
    MOMENTS          ON|OFF
    POSITION         ON|OFF
    COEFFICIENTS     ON|OFF
    GROUND_REACTIONS ON|OFF
    FCS              ON|OFF
    PROPULSION       ON|OFF

    NOTE that Time is always output with the data.
  -->
  <OUTPUT NAME="JSBout182.csv" TYPE="NONE">
    RATE_IN_HZ       10
    SIMULATION       OFF
    ATMOSPHERE       OFF
    MASSPROPS        ON
    AEROSURFACES     ON
    RATES            ON
    VELOCITIES       ON
    FORCES           ON
    MOMENTS          ON
    POSITION         ON
    COEFFICIENTS     ON
    GROUND_REACTIONS ON
    FCS              ON
    PROPULSION       ON
  </OUTPUT>
</FDM_CONFIG>
