<FDM_CONFIG NAME="MK-82" VERSION="1.57">

  <!--

  File:        mk82.xml
  Author:      Cameron Munro
  CVS Version: $Id: mk82.xml,v 1.1 2001/12/11 17:25:37 jberndt Exp $

  Function: Models a 500 lb. Mk-82 bomb
  Notes:    Try running JSBSim using this command line,
            ./jsbsim mk82 reset00
  -->

  <METRICS>

    <!--
    Center of gravity location, empty weight, in aircraft structural coord
    system. X, Y, Z, in inches; X is positive out the tail, Y positive out the
    right wing.

    Pilot eyepoint location, in aircraft coord system, FROM cg.
    X, Y, Z, in inches
    -->

    AC_WINGAREA 2.54
    AC_WINGSPAN 0.9
    AC_CHORD    0.9
    AC_IXX      0.66
    AC_IYY      633.0
    AC_IZZ      633.0
    AC_IXZ      0
    AC_EMPTYWT  500
    AC_CGLOC    31.0 0.0 0.0
    AC_EYEPTLOC  0.0  0.0 0.0
    AC_AERORP   33.08 0.0 0.0

  </METRICS>

  <UNDERCARRIAGE>

    <!--
    the gear parameters that can be specified are as follows, IN ORDER OF APPEARANCE:

    AC_GEAR
    <name>                           name of gear entry - no spaces allowed
    <X> <Y> <Z>                      Gear location in aircraft body coords in inches
    <spring constant>                spring constant in lbs/ft
    <damping coefficient>            damping coefficient in lbs/ft/sec
    <dynamic friction coefficient>   Self-explanatory: sliding friction coefficient
    <static friction coefficient>    Self-explanatory: "onset" friction coefficient
    <rolling resistance coefficient> Self-explanatory: rolling resistance coefficient
    <steerability attribute>         One of <STEERABLE | FIXED | CASTERED>
    <brake group membership>         One of <LEFT | CENTER | RIGHT | NOSE | TAIL | NONE>
    <max steer angle>                Maximum steerable angle in degrees
    <retractable>                    FIXED or RETRACTABLE
    -->

   AC_GEAR  NOSE_CONTACT    0.0  0.0  0.0  10000 200000  0.0  0.0  0.0  FIXED NONE 0 FIXED
   AC_GEAR  TAIL_CONTACT   66.0  0.0  0.0  10000 200000  0.0  0.0  0.0  FIXED NONE 0 FIXED

  </UNDERCARRIAGE>

  <PROPULSION>
    <!--
      No propulsion
    -->
  </PROPULSION>

  <FLIGHT_CONTROL NAME="MK-82 FCS">
    <!--
      No FCS
    -->
  </FLIGHT_CONTROL>


  <AERODYNAMICS>

    <!--
      Data as computed from Missile DATCOM by Cameron Munro
    -->

    <AXIS NAME="LIFT">

      <COEFFICIENT NAME="CLwbh" TYPE="TABLE">
        Lift_due_to_alpha
        10
        13
        FG_ALPHA FG_MACH
        FG_QBAR|FG_WINGAREA|FG_ALPHA
                0.2     0.4     0.8     0.9     0.95    0.98    1       1.02    1.05    1.1     1.2     1.4     1.6
        0.000   0       0       0       0       0       0       0       0       0       0       0       0       0
        0.175   0.892   0.853   0.605   0.596   0.583   0.577   0.578   0.572   0.564   0.551   0.629   0       0
        0.349   1.891   1.598   1.239   1.246   1.224   1.222   1.231   1.224   1.23    1.234   1.75    0.918   0.653
        0.524   2.68    2.389   2.131   2.715   2.82    2.967   3.095   3.167   3.245   3.306   3.586   2.371   1.953
        0.698   2.713   2.671   3.865   3.966   4.088   4.274   4.432   4.546   4.658   4.719   4.95    4.082   3.381
        0.873   2.22    2.425   4.113   4.132   4.258   4.495   4.688   4.834   4.976   5.002   5.106   5.058   4.159
        1.047   1.777   1.999   3.742   3.769   3.87    4.062   4.218   4.326   4.428   4.476   4.589   5.269   4.465
        1.222   1.23    1.5     2.849   2.819   2.874   3.028   3.154   3.243   3.329   3.384   3.465   4.708   4.121
        1.396   0.612   0.794   1.535   1.494   1.531   1.617   1.685   1.732   1.787   1.823   1.85    3.521   3.17
        1.553   0.047   0.067   0.145   0.14    0.144   0.152   0.159   0.16    0.165   0.169   0.172   1.877   1.732
      </COEFFICIENT>

    </AXIS>

    <AXIS NAME="DRAG">

      <COEFFICIENT NAME="CDalpha" TYPE="TABLE">
        Drag_due_to_alpha
        10
        13
        FG_ALPHA FG_MACH
        FG_QBAR|FG_WINGAREA
                0.2     0.4     0.8     0.9     0.95    0.98    1       1.02    1.05    1.1     1.2     1.4     1.6
        0.000   0.14    0.139   0.144   0.149   0.211   0.252   0.281   0.305   0.327   0.359   0.373   0       0
        0.175   0.296   0.289   0.251   0.254   0.314   0.354   0.383   0.406   0.426   0.457   0.484   0.418   0.275
        0.349   0.813   0.712   0.594   0.6     0.655   0.695   0.726   0.748   0.772   0.806   0.996   0.578   0.394
        0.524   1.616   1.471   1.343   1.636   1.748   1.862   1.955   2.014   2.073   2.133   2.287   1.274   1.004
        0.698   2.261   2.236   3.001   3.063   3.199   3.358   3.489   3.583   3.673   3.736   3.902   2.761   2.271
        0.873   2.642   2.894   4.707   4.71    4.889   5.173   5.402   5.579   5.745   5.786   5.885   4.644   3.851
        1.047   3.089   3.479   6.344   6.374   6.573   6.907   7.176   7.371   7.545   7.636   7.812   6.626   5.635
        1.222   3.412   4.159   7.757   7.666   7.831   8.257   8.604   8.864   9.099   9.254   9.462   8.443   7.399
        1.396   3.554   4.588   8.733   8.494   8.717   9.205   9.595   9.895   10.208  10.41   10.555  9.904   8.922
        1.553   3.523   4.664   9.101   8.811   9.063   9.573   9.98    10.317  10.648  10.863  10.966  10.851  10.015
      </COEFFICIENT>

    </AXIS>

    <AXIS NAME="SIDE">

      <COEFFICIENT NAME="CYb" TYPE="VALUE">
        Side_force_due_to_beta
        FG_QBAR|FG_WINGAREA|FG_BETA
        0.0
      </COEFFICIENT>

    </AXIS>

    <AXIS NAME="ROLL">
      <!--
        No roll derivatives
      -->
    </AXIS>

    <AXIS NAME="PITCH">

      <COEFFICIENT NAME="Cmalpha" TYPE="TABLE">
        Pitch_moment_due_to_alpha
        10
        13
        FG_ALPHA FG_MACH
        FG_QBAR|FG_WINGAREA|FG_CBAR|FG_ALPHA
                0.2     0.4     0.8     0.9     0.95    0.98    1       1.02    1.05    1.1     1.2     1.4     1.6
        0.000   -1.372  -1.783  -1.325  -0.261  -0.267  -0.053  -0.228  -0.111  0.398   -0.001  -1.693  -3.622  9.024
        0.175   -3.699  -3.767  -2.384  -1.263  -1.168  -0.921  -1.039  -0.873  -0.330  -0.507  -1.538  -2.550  8.734
        0.349   -6.284  -6.212  -4.594  -3.443  -3.258  -2.988  -3.042  -2.872  -2.376  -2.401  -3.163  -3.719  5.667
        0.524   -6.683  -6.645  -5.490  -4.885  -4.762  -4.588  -4.630  -4.547  -4.266  -4.303  -5.053  -5.767  0.458
        0.698   -1.322  -1.746  -2.730  -3.121  -3.282  -3.345  -3.436  -3.503  -3.563  -3.790  -4.588  -6.019  -3.949
        0.873   0.427   -0.095  -2.134  -2.900  -3.137  -3.320  -3.391  -3.537  -3.817  -3.987  -4.419  -5.621  -7.850
        1.047   -3.016  -3.029  -4.167  -4.973  -5.095  -5.269  -5.263  -5.404  -5.745  -5.655  -5.411  -5.544  -11.380
        1.222   -4.218  -4.106  -5.292  -6.268  -6.356  -6.549  -6.510  -6.664  -7.063  -6.885  -6.396  -6.149  -14.120
        1.396   -4.548  -4.488  -5.795  -6.809  -6.878  -7.091  -7.053  -7.218  -7.650  -7.455  -6.902  -6.550  -15.150
        1.553   -4.548  -4.546  -5.885  -6.854  -6.929  -7.150  -7.117  -7.276  -7.725  -7.539  -6.970  -6.606  -15.160
      </COEFFICIENT>

    </AXIS>

    <AXIS NAME="YAW">
      <!--
        No yaw derivatives
      -->
    </AXIS>

  </AERODYNAMICS>

  <OUTPUT NAME="JSBout.csv" TYPE="CSV">
    RATE_IN_HZ       20
    SIMULATION       ON
    ATMOSPHERE       OFF
    MASSPROPS        OFF
    AEROSURFACES     ON
    RATES            ON
    VELOCITIES       ON
    FORCES           ON
    MOMENTS          ON
    POSITION         ON
    COEFFICIENTS     OFF
    GROUND_REACTIONS ON
    FCS              ON
    PROPULSION       ON
  </OUTPUT>

</FDM_CONFIG>
