<?xml version="1.0"?>
<?xml-stylesheet type="text/xsl" href="http://jsbsim.sourceforge.net/JSBSimScript.xsl"?>
<runscript xmlns:xsi="http://www.w3.org/2001/XMLSchema-instance"
    xsi:noNamespaceSchemaLocation="http://jsbsim.sf.net/JSBSimScript.xsd"
    name="C172-01A takeoff run">
  <!--
    This run is for testing the C172 altitude hold autopilot
  -->

  <use aircraft="c172x" initialize="reset00"/>
  <run start="0.0" end="200" dt="0.0083333">

    <!-- Initialize with brakes on -->
    <property> simulation/notify-time-trigger </property>
    <property value="1"> simulation/run_id </property>
    <property value="1"> fcs/left-brake-cmd-norm </property>
    <property value="1"> fcs/right-brake-cmd-norm </property>
    <property value="1"> fcs/center-brake-cmd-norm </property>

    <event name="engine start">
      <description>Start the engine</description>
      <condition> sim-time-sec >= 0.25 </condition>
      <set name="fcs/throttle-cmd-norm" value="1.0" action="FG_RAMP" tc ="0.5"/>
      <set name="fcs/mixture-cmd-norm" value="1.00" action="FG_RAMP" tc ="0.5"/>
      <set name="propulsion/magneto_cmd" value="3"/>
      <set name="propulsion/starter_cmd" value="1"/>
      <notify>
        <property>simulation/run_id</property>
        <property>ap/hdg-roll-err-c1</property>
      </notify>
    </event>

    <event name="Set heading hold">
      <description>
        Set heading hold when time is greater than 0.25 sec.
      </description>
      <condition> sim-time-sec >= 0.25 </condition>
      <set name="ap/roll-attitude-mode" value="0"/>
      <set name="ap/autopilot-roll-on" value="1"/>
      <notify/>
    </event>

    <event name="Begin roll">
      <description>Release brakes and get rolling with flaps at 10 degrees. </description>
      <condition> sim-time-sec >= 2.0 </condition>
      <set name="fcs/left-brake-cmd-norm" value="0"/>
      <set name="fcs/right-brake-cmd-norm" value="0"/>
      <set name="fcs/center-brake-cmd-norm" value="0"/>
      <set name="fcs/flap-cmd-norm" value="0.16"/>
    </event>

    <event name="Rotate">
      <description>Set Autopilot for 500 ft and rotate at 49 keas. </description>
      <notify/>
      <condition> velocities/vc-kts >= 49 </condition>
      <set name="ap/altitude_setpoint" value="500.0"/>
      <set name="ap/altitude_hold" value="1"/>
      <set name="fcs/flap-cmd-norm" value=".33"/>
    </event>

    <event name="Set autopilot for 6000 ft.">
      <description>Set Autopilot for 6000 ft after a five second delay. </description>
      <notify/>
      <condition> velocities/vc-kts >= 49 </condition>
      <delay>5.0</delay>
      <set name="ap/altitude_setpoint" value="6000.0"/>
    </event>

<!--
    <event name="Turn on autopilot wing leveler">
      <condition>
        position/h-agl-ft >= 50
      </condition>
      <set name="ap/autopilot-roll-on" value="1"/>
      <set name="ap/roll-attitude-mode" value="0"/>
      <notify/>
    </event>
-->
    <event name="Adjust throttle/flaps">
      <description>Remove flaps at 50 ft and set heading to 100; acquire heading.</description>
      <notify/>
      <condition>
        position/h-agl-ft >= 2000
      </condition>
      <set name="fcs/flap-cmd-norm" value="0"/>
      <set name="guidance/specified-heading-rad" value="1.75"/>
      <set name="guidance/heading-selector-switch" value="1"/>
      <set name="ap/roll-attitude-mode" value="1"/>
    </event>

    <event name="Time Notify" persistent="true">
      <description>Output message at 1 minute intervals</description>
      <notify>
        <property>velocities/vc-kts</property>
        <property>position/h-agl-ft</property>
        <property>position/lat-geod-deg</property>
        <property>position/geod-alt-ft</property>
      </notify>
      <condition> sim-time-sec >= simulation/notify-time-trigger </condition>
      <set name="simulation/notify-time-trigger" value="60" type="FG_DELTA"/>
    </event>
<!--
    <event name="Set heading hold">
      <description>Set Heading when 6000 ft AGL is reached</description>
      <notify/>
      <condition>
        position/h-agl-ft >= 5999
      </condition>
      <set name="ap/heading_setpoint" value="20"/>
    </event>
-->
    <event name="Nose gear liftoff">
      <description>Report roll length when nosegear lifts off</description>
      <condition>
        gear/unit/WOW == 0
        sim-time-sec > 1.0
      </condition>
      <notify>
        <property>position/distance-from-start-mag-mt</property>
      </notify>
    </event>

    <event name="Left main gear liftoff">
      <description>Report roll length when left main gear lifts off</description>
      <condition>
        gear/unit[1]/WOW == 0
        sim-time-sec > 1.0
      </condition>
      <notify>
        <property>position/distance-from-start-mag-mt</property>
      </notify>
    </event>

    <event name="Report rollout distance at 50 foot clearance">
      <description>Report takeoff length at 50 foot clearance</description>
      <condition>
        position/h-agl-ft >= 50
      </condition>
      <notify>
        <property>position/distance-from-start-mag-mt</property>
      </notify>
    </event>

  </run>
</runscript>
